Simulations: Area=0
  Simulation Test: Area=0
    WeatherFile: FileName=Goondiwindi.met
    Clock: StartDate=1940-01-01; EndDate=1989-12-31
    Summary
    Zone Field: Area=0
      Report: Events=Clock.EndOfDay
        Variables:
          .Clock.Today
          .WeatherFile.DayLength
          .WeatherFile.MaxT
          .WeatherFile.MinT
          .WeatherFile.Radn
          .WeatherFile.Rain
          Manager.Model.A
          Soil.SoilWater.sw_dep
      Manager Script
        A = 109608
```csharp
        using System;
        using Models.Core;

        namespace Models
        {
            public class Script : Model
            {      
               // Links
               [Link] Clock Clock;

               // Parameters
               public double A { get; set; }
               
               // Outputs
               public double B { get { return A * 9; } }

               public override void OnInitialised()
               {
                  Clock.StartOfDay += OnStartOfDay;
               }

               private void OnStartOfDay()
               {
                  A++;
               }
            }
        }
```
      Soil: SoilType=Black Vertosol; LocalName=Waco; Site=Jimbour; NearestTown=Jimbour, Q 4352; Region=South East Queensland; NaturalVegetation=Grassland, mainly Qld bluegrass; Latitude=0; Longitude=0
        Water
          Thickness  BD    AirDry  LL15  DUL   SAT
          150        1.02  0.15    0.29  0.54  0.59
          150        1.03  0.26    0.29  0.53  0.58
          300        1.02  0.29    0.29  0.54  0.59
          300        1.02  0.29    0.29  0.54  0.58
          300        1.06  0.3     0.3   0.52  0.57
          300        1.11  0.31    0.31  0.5   0.55
          300        1.12  0.32    0.32  0.5   0.55
          300        1.15  0.33    0.33  0.48  0.53
          300        1.18  0.34    0.34  0.47  0.52
          300        1.2   0.35    0.35  0.46  0.51
          300        1.25  0.36    0.36  0.44  0.49
        SoilWater: swcon=[0.3, 0.3, 0.3, 0.3, 0.3, 0.3, 0.3, 0.3, 0.3, 0.3, 0.3]; mwcon=[1, 1, 1, 1, 1, 1, 1, 1, 1, 1, 1]; ks=[0, 0, 0, 0, 0, 0, 0, 0, 0, 0, 0]; klat=[0, 0, 0, 0, 0, 0, 0, 0, 0, 0, 0]; dlayer=[150, 150, 300, 300, 300, 300, 300, 300, 300, 300, 300]; sat_dep=[88.5, 87, 177, 174, 171, 165, 165, 159, 156, 153, 147]; dul_dep=[81, 79.5, 162, 162, 156, 150, 150, 144, 141, 138, 132]; ll15_dep=[43.5, 43.5, 87, 87, 90, 93, 96, 99, 102, 105, 108]; air_dry_dep=[22.5, 39, 87, 87, 90, 93, 96, 99, 102, 105, 108]
          bd=[1.02, 1.03, 1.02, 1.02, 1.06, 1.11, 1.12, 1.15, 1.18, 1.2, 1.25]
          sat=[0.59, 0.58, 0.59, 0.58, 0.57, 0.55, 0.55, 0.53, 0.52, 0.51, 0.49]
          dul=[0.54, 0.53, 0.54, 0.54, 0.52, 0.5, 0.5, 0.48, 0.47, 0.46, 0.44]
          ll15=[0.29, 0.29, 0.29, 0.29, 0.3, 0.31, 0.32, 0.33, 0.34, 0.35, 0.36]
          air_dry=[0.15, 0.26, 0.29, 0.29, 0.3, 0.31, 0.32, 0.33, 0.34, 0.35, 0.36]
        SoilOrganicMatter: RootCN=0; RootWt=0; SoilCN=0; EnrACoeff=0; EnrBCoeff=0; OCUnits=Total
        Analysis: PHUnits=Water; BoronUnits=HotWater
        InitialWater Initial water: FractionFull=1; PercentMethod=FilledFromTop
  DataStore
  Tests
    Test={SimulationName=Test, TableName=Report, Type=AllPos, ColumnNames=.WeatherFile.MaxT}
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